// COMSOL Multiphysics 5.2.1.152 model "0524 UniTransMatlab.mph"
// Outline of the model tree

Parameters
  a1 = b1
  a2 = b2
  a3 = b3
  b1 = (50[mm]-2*b2-2*b3)/11
  b2 = 2.8[mm]
  b3 = 8[mm]
  d = 1.5[mm]
  D = 1.5[mm]
  H = 30[mm]
  loss = 0.09
  num = 3
  sqz = 0[mm]
  tot_W = 2*(6.5*d+4*b1+b2+b3)
  W = 0.13[m]
  width = 11*d+6*b1+2*b2+2*b3

Variables
  var1 "Variables 1"
    p_i = exp(-1i*acpr.k*x)[Pa]
    s11 = intop1(acpr.p_t-p_i)/intop1(p_i)
    s21 = intop2(acpr.p_t)/intop1(p_i)
    s21p = s21*exp(i*acpr.k*(W-2*b3))

Couplings
  intop1: Integration on boundaries 1
  intop2: Integration on boundaries 66

Geometry
  geom1 "Geometry 1" (2D, length unit mm)
    r1: Rectangle | pos = {0, 0}; base = center; size = {W, H}
    r3: Rectangle | contributeto = csel1; pos = {-((num*2-1)*d+num*b1+b2+b3), a3/2}; base = center; size = {d, H-a3-2*D}
    r8: Rectangle | contributeto = csel1; pos = {-(num*2-3)*d-(num*2-3)*b1, a1/2}; base = center; size = {d, H-a1-2*D}
    b1: BezierPolygon "Bézier Polygon 1" | p = {{-width/2, -width/2}, {H/2, -H/2}}; degree = 1; w = {1, 1}
    b2: BezierPolygon "Bézier Polygon 2" | p = {{width/2, width/2}, {H/2, -H/2}}; degree = 1; w = {1, 1}
    r4: Rectangle (disabled)
      contributeto = csel1
      pos = {-(num*2*d+2*(num-1)*b1+b2+b3), -a3/2}
      base = center
      size = {d, H-a3-2*D}
    r11: Rectangle | contributeto = csel1; pos = {-((num*2-2)*d+num*b1+b2), -a2/2}; base = center; size = {d, H-a2-2*D}
    mir1: Mirror | contributeto = csel1; input = r3(1), r8(1), r11(1); keep = on
    r5: Rectangle | contributeto = csel1; pos = {0, -H/2+D/2}; base = center; size = {((num*2-1)*d+num*b1+b2+b3)*2+d, D}
    r6: Rectangle | contributeto = csel1; pos = {0, H/2-D/2}; base = center; size = {((num*2-1)*d+num*b1+b2+b3)*2+d, D}
    r2: Rectangle
      contributeto = csel2
      pos = {-((num*2-4)*d+(num-2)*2*b1), -(a1/2)-sqz/2-D/2}
      base = center
      size = {d, H-a1-2*D-sqz+D}
    arr1: Array | contributeto = csel1; input = r2(1); size = {num*2-3, 1}; displ = {(d+b1)*2, 0}
    r12: Rectangle | contributeto = csel3; pos = {-d-b1, a1/2}; base = center; size = {d, H-a1-2*D}
    arr2: Array | contributeto = csel1; input = r12(1); size = {(num-2)*2, 1}; displ = {(d+b1)*2, 0}
    r9: Rectangle | contributeto = csel1; pos = {0, -(-H+sqz+d)/2}; base = center; size = {(num*2)*b1+(num*2-1)*d, sqz+D}
    uni1: Union
      contributeto = csel4
      input = r3(1), r8(1), r11(1), mir1(1), mir1(2), mir1(3), r5(1), r6(1), arr1(1%2C1), arr1(2%2C1), arr1(3%2C1), arr2(1%2C1), arr2(2%2C1), r9(1)
      intbnd = off
      edge = all
    r10: Rectangle (disabled)
      contributeto = csel5
      pos = {0, (H-d-sqz)/2}
      base = center
      size = {num*2*b1+(num*2-5)*d, sqz-d}
    dif1: Difference (disabled) | input = uni1(1)
    fin: Finalize "Form Union"

Materials
  mat1: Common "Air 1" on all domains
    def "Basic"
      density = 1.25
      soundspeed = 343
  mat2: Common "Air 1.1" on domains 3
    def "Basic"
      density = 1.25*(1-loss*i)
      soundspeed = 343/sqrt(1-loss*i)
      heatcapacity = 1003
      ratioofspecificheat = 1.4
      dynamicviscosity = 2*10^(-5)
      thermalconductivity = 0.024

Physics
  acpr: PressureAcoustics "Pressure Acoustics, Frequency Domain" on domains 1, 3, 5
    dependent variable p
    fpam1: FrequencyPressureAcousticsModel "Pressure Acoustics 1" (default)
    shb1: SoundHard "Sound Hard Boundary (Wall) 1" (default)
    init1: init "Initial Values 1" (default)
    pwr1: PlaneWaveRadiation on boundaries 1, 66
      ipf1: IncidentPressureField on boundaries 1, 7, 11, 13, 17-20, 24, 27, 28, 30, 34, 37, 38, 40, 44, 47, 48, 50-53, 57
        dir = {1, 0, 0}
        pamp = 1
        c = acpr.c_c
    ishb1: InteriorSoundHard "Interior Sound Hard Boundary (Wall) 1" on no boundaries
    nra1: NarrowRegionAcousticsModel "Narrow Region Acoustics 1" (disabled) on domains 1, 3, 5 | Hd = 0.0025

Mesh
  mesh1 "Mesh 1" (physics-controlled)
    size: MeshSizeDefault | hauto = 2

Studies
  std1 "Study 1"
    freq: Frequency "Frequency Domain" | punit = Hz; plist = range(2000,50,3000)

Solver configurations
  sol1 "Solution 1" (study std1)
    v1: Variables "Dependent Variables 1"
    s1: Stationary "Stationary Solver 1"
      dDef: Direct
      p1: Parametric | pname = freq; plistarr = range(2000,50,3000); punit = Hz; pcontinuationmode = no
      fc1: FullyCoupled

Datasets
  dset1: Solution | solution = sol1

Methods
  method1: CodeEditor "Method 1"
    public class method1 extends ApplicationMethod {
      public void execute() {
        model.geom("geom1").run();
        useGraphics(model.geom("geom1"), "form1/graphics1");
      }
    }
  method2: CodeEditor "Method 2"
    public class method2 extends ApplicationMethod {
      public void execute() {
        evaluateToResultsTable(model.result().numerical("gev1"), "tbl1", true);
        useGraphics(model.result("pg6"), "form1/graphics2");
      }
    }